<?xml version="1.0"?>
<!--
  File:     Rolls Royce Nene.xml
  Author:   Aero-Matic v 0.7
  updated to version 2 format, Ron Jensen

  Inputs:
    name:           Rolls-Royce Nene
    type:           turbine
    thrust:        5000 lb
    augmented?      no
    injected?       no
-->

<turbine_engine name="RR-Nene">
  <milthrust>   4990 </milthrust>
  <bypassratio>  0.12</bypassratio>
  <pressureratio> 6.0 </pressureratio>
  <tsfc>            0.37 </tsfc>
  <bleed>           0.02</bleed>
  <idlen1>         26.0 </idlen1>
  <idlen2>         42.0 </idlen2>
  <maxn1>         100.0 </maxn1>
  <maxn2>         100.0 </maxn2>
  <augmented>         0 </augmented>
  <injected>          0 </injected>
  <n1spinup>        6.5 </n1spinup>

  <function name="IdleThrust">
   <table>
    <independentVar lookup="row">velocities/mach</independentVar>
    <independentVar lookup="column">atmosphere/density-altitude</independentVar>
    <tableData>
       -10000     0     10000   20000   30000   40000   50000
  0.0  0.040  0.0480  0.0528  0.0694  0.0899  0.1183  0.1467
  0.2  0.0500  0.0501  0.0335  0.0544  0.0797  0.1049  0.1342
  0.4  0.0040  0.0047  0.0020  0.0272  0.0595  0.0891  0.1203
  0.6  0.0     0.0     0.0     0.0     0.0276  0.0718  0.1073
  0.8  0.0     0.0     0.0     0.0     0.0474  0.0868  0.0900
  1.0  0.0     0.0     0.0     0.0     0.0     0.0552  0.0800
    </tableData>
   </table>
  </function>

  <function name="MilThrust">
   <table>
    <independentVar lookup="row">velocities/mach</independentVar>
    <independentVar lookup="column">atmosphere/density-altitude</independentVar>
    <tableData>
        -10000       0   10000   20000   30000   40000   50000
  0.0   1.2600  1.0000  0.8800  0.8040  0.690  0.6410  0.1490
  0.2   1.2410  0.9970  0.8340  0.78560 0.6050  0.6310  0.1430
  0.4   1.2200  0.9881  0.7920  0.760   0.570  0.6330  0.1450
  0.6   1.2010  0.9910  0.8310  0.6920  0.5480  0.6480  0.1540
  0.8   1.2380  1.0200  0.8520  0.6220  0.4170  0.2750  0.1700
  1.0   1.3690  1.1200  0.8710  0.6510  0.4750  0.3150  0.1950
  1.2   1.4850  1.2300  0.9750  0.7440  0.5450  0.3640  0.2250
  1.4   1.5941  1.3400  1.0860  0.8150  0.6280  0.4240  0.2630
    </tableData>
   </table>
  </function>
</turbine_engine>
